# OpenSim document version 40000
ScaleTool FullBody-for-Anthropometric-data-scaled:
  mass: 75 [kg]
  height: -1
  age: -1
  GenericModelMaker:
    marker_set_file: scale-markers.xml
  ModelScaler:
    apply: true
    scaling_order: measurements
    marker_file: ScalingFakeMarkerFile.trc
    time_range: 0 0.2
    preserve_mass_distribution: false
    MeasurementSet:
      Measurement UpperLeg: apply=true
        MarkerPair: markers=(Trochanter-L Knee)
        BodyScale femur_r: axes=(X Y Z)
        BodyScale femur_l: axes=(X Y Z)
      Measurement LowerLeg: apply=true
        MarkerPair: markers=(Knee FootGround)
        BodyScale tibia_r: axes=(X Y Z)
        BodyScale calcn_r: axes=(X Y Z)
        BodyScale toes_r: axes=(X Y Z)
        BodyScale tibia_l: axes=(X Y Z)
        BodyScale calcn_l: axes=(X Y Z)
        BodyScale toes_l: axes=(X Y Z)
      Measurement Torso-Z: apply=false
        MarkerPair: markers=(Acromion-R Acromion-L)
      Measurement UpperArm: apply=true
        MarkerPair: markers=(Acromion-L Elbow)
        BodyScale humerus_r: axes=(X Y Z)
        BodyScale humerus_l: axes=(X Y Z)
      Measurement LowerArm: apply=true
        MarkerPair: markers=(Elbow Fist)
        BodyScale ulna_r: axes=(X Y Z)
        BodyScale radius_r: axes=(X Y Z)
        BodyScale ulna_l: axes=(X Y Z)
        BodyScale radius_l: axes=(X Y Z)
      Measurement Global: apply=true
        MarkerPair: markers=(Vertex Ground)
        MarkerPair: markers=(Trochanter-L Knee)
        MarkerPair: markers=(Knee FootGround)
        MarkerPair: markers=(Acromion-R Acromion-L)
        MarkerPair: markers=(Acromion-L Elbow)
        MarkerPair: markers=(Elbow Fist)
        MarkerPair: markers=(Trochanter-R Trochanter-L)
        BodyScale pelvis: axes=(X Y Z)
        BodyScale patella_r: axes=(X Y Z)
        BodyScale talus_r: axes=(X Y Z)
        BodyScale patella_l: axes=(X Y Z)
        BodyScale talus_l: axes=(X Y Z)
        BodyScale torso: axes=(X Y Z)
        BodyScale hand_r: axes=(X Y Z)
        BodyScale hand_l: axes=(X Y Z)
      Measurement Pelvis: apply=false
        MarkerPair: markers=(Trochanter-R Trochanter-L)
  MarkerPlacer:
    apply: false
    marker_file: ScalingFakeMarkerFile.trc
    time_range: 0 0.2
    max_marker_movement: -1
    IKTaskSet:
      IKMarkerTask Vertex: apply=true weight=1
      IKMarkerTask Acromion-R: apply=true weight=1
      IKMarkerTask Elbow: apply=true weight=1
      IKMarkerTask Fist: apply=true weight=1
      IKMarkerTask Trochanter-L: apply=true weight=1
      IKMarkerTask Acromion-L: apply=true weight=1
      IKMarkerTask Trochanter-R: apply=true weight=1
      IKMarkerTask Knee: apply=true weight=1
      IKMarkerTask Ground: apply=true weight=1
      IKMarkerTask FootGround: apply=true weight=1
