# OpenSim document version 40000
MarkerSet:
  Marker Vertex: ground (0 1.67928 0)
  Marker Acromion-R: ground (0 1.42105 0.148272)
  Marker Elbow: ground (0 1.11274 -0.153997)
  Marker Fist: ground (0 0.77448 -0.153997)
  Marker Trochanter-L: ground (0 0.839314 -0.135969)
  Marker Acromion-L: ground (0 1.42105 -0.153997)
  Marker Trochanter-R: ground (0 0.839314 0.13763)
  Marker Knee: ground (0 0.435996 -0.135969)
  Marker Ground: ground (0 0 0)
  Marker FootGround: ground (0 0 -0.135969)
