# OpenSim document version 40000
MarkerSet:
  Marker SpineBase: pelvis (-0.0908783 0.056072 0) fixed=true
  Marker HipLeft: pelvis (-0.0471438 -0.077138 -0.0846705) fixed=true
  Marker HipRight: pelvis (-0.0471438 -0.077138 0.0846705) fixed=true
  Marker KneeLeft: femur_l (0.0315875 -0.428325 0.0011227) fixed=true
  Marker KneeRight: femur_r (0.0315875 -0.428325 -0.0011227) fixed=true
  Marker AnkleLeft: tibia_l (-0.01823674 -0.396104 -0.02766726) fixed=true
  Marker AnkleRight: tibia_r (-0.01823674 -0.396104 0.02766726) fixed=true
  Marker FootLeft: calcn_l (0.2267585 -0.0151348 -0.02629826)
  Marker FootRight: calcn_r (0.2267585 -0.0151348 0.02629826)
  Marker SpineMid: torso (0.0098217 0.175336 0) fixed=true
  Marker SpineShoulder: torso (0.0098217 0.37238 0) fixed=true
  Marker ShoulderLeft: torso (0.0098217 0.37238 -0.17817) fixed=true
  Marker ShoulderRight: torso (0.0098217 0.37238 0.17817) fixed=true
  Marker ElbowLeft: humerus_l (0.0037444 -0.29359 -0.003234) fixed=true
  Marker ElbowRight: humerus_r (0.0037444 -0.29359 0.003234) fixed=true
  Marker WristLeft: radius_l (-0.009416569 -0.2447527 -0.01069801) fixed=true
  Marker WristRight: radius_r (-0.009440556 -0.2447504 0.01070353) fixed=true
  Marker HandLeft: hand_l (-0.000173 -0.082423 0.005603)
  Marker HandRight: hand_r (-0.000173 -0.082423 -0.005603)
  Marker HandTipLeft: hand_l (0.0470106 -0.142652 0.010357)
  Marker HandTipRight: hand_r (0.0470106 -0.142652 -0.010357)
  Marker ThumbLeft: hand_l (0.0185452 -0.088911 -0.042282)
  Marker ThumbRight: hand_r (0.0185452 -0.088911 0.042282)
  Marker Neck: torso (-0.01185764 0.4484681 0) fixed=true
  Marker Head: torso (-0.005239057 0.5550755 0) fixed=true
