# OpenSim document version 40000
InverseKinematicsTool:
  time_range: 0 13.93333
  marker_file: IKFakeMarkerFile.trc
  IKTaskSet:
    IKMarkerTask SpineBase: apply=true weight=10
    IKMarkerTask HipLeft: apply=true weight=10
    IKMarkerTask HipRight: apply=true weight=10
    IKMarkerTask KneeLeft: apply=true weight=10
    IKMarkerTask KneeRight: apply=true weight=10
    IKMarkerTask AnkleLeft: apply=true weight=10
    IKMarkerTask AnkleRight: apply=true weight=10
    IKMarkerTask FootLeft: apply=true weight=10
    IKMarkerTask FootRight: apply=true weight=10
    IKMarkerTask SpineMid: apply=true weight=10
    IKMarkerTask SpineShoulder: apply=true weight=10
    IKMarkerTask ShoulderLeft: apply=true weight=10
    IKMarkerTask ShoulderRight: apply=true weight=10
    IKMarkerTask ElbowLeft: apply=true weight=10
    IKMarkerTask ElbowRight: apply=true weight=10
    IKMarkerTask WristLeft: apply=true weight=10
    IKMarkerTask WristRight: apply=true weight=10
    IKMarkerTask HandLeft: apply=false weight=2
    IKMarkerTask HandRight: apply=false weight=2
    IKMarkerTask HandTipLeft: apply=true weight=2
    IKMarkerTask HandTipRight: apply=true weight=2
    IKMarkerTask ThumbLeft: apply=false weight=1
    IKMarkerTask ThumbRight: apply=false weight=1
    IKMarkerTask Neck: apply=true weight=10
    IKMarkerTask Head: apply=true weight=10
