# OpenSim document version 40000
ScaleTool FullBody-Template-scaled:
  mass: 70 [kg]
  height: -1
  age: -1
  GenericModelMaker:
    marker_set_file: IK-markers.xml
  ModelScaler:
    apply: true
    scaling_order: measurements
    marker_file: IKFakeMarkerFile.trc
    time_range: 0 0.5
    preserve_mass_distribution: true
    MeasurementSet:
      Measurement Pelvis: apply=true
        MarkerPair: markers=(HipLeft HipRight)
        MarkerPair: markers=(ShoulderLeft ShoulderRight)
        BodyScale pelvis: axes=(X Y Z)
      Measurement Femur: apply=true
        MarkerPair: markers=(HipLeft KneeLeft)
        MarkerPair: markers=(HipRight KneeRight)
        BodyScale femur_r: axes=(X Y Z)
        BodyScale femur_l: axes=(X Y Z)
      Measurement Tibia: apply=true
        MarkerPair: markers=(KneeLeft AnkleLeft)
        MarkerPair: markers=(KneeRight AnkleRight)
        BodyScale tibia_r: axes=(X Y Z)
        BodyScale tibia_l: axes=(X Y Z)
      Measurement Torso: apply=true
        MarkerPair: markers=(HipLeft HipRight)
        MarkerPair: markers=(ShoulderLeft ShoulderRight)
        MarkerPair: markers=(ShoulderLeft HipLeft)
        MarkerPair: markers=(ShoulderRight HipRight)
        BodyScale torso: axes=(X Y Z)
      Measurement Humerus: apply=true
        MarkerPair: markers=(ShoulderRight ElbowRight)
        MarkerPair: markers=(ShoulderLeft ElbowLeft)
        BodyScale humerus_r: axes=(X Y Z)
        BodyScale humerus_l: axes=(X Y Z)
      Measurement Ulna: apply=true
        MarkerPair: markers=(ElbowLeft WristLeft)
        MarkerPair: markers=(ElbowRight WristRight)
        BodyScale ulna_r: axes=(X Y Z)
        BodyScale radius_r: axes=(X Y Z)
        BodyScale ulna_l: axes=(X Y Z)
        BodyScale radius_l: axes=(X Y Z)
      Measurement Hand: apply=true
        MarkerPair: markers=(WristLeft HandLeft)
        MarkerPair: markers=(WristLeft HandTipLeft)
        MarkerPair: markers=(WristRight HandRight)
        MarkerPair: markers=(WristRight HandTipRight)
        BodyScale hand_r: axes=(X Y Z)
        BodyScale hand_l: axes=(X Y Z)
  MarkerPlacer:
    apply: true
    marker_file: IKFakeMarkerFile.trc
    time_range: 0 0.5
    max_marker_movement: -1
    IKTaskSet:
      IKMarkerTask SpineBase: apply=true weight=20
      IKMarkerTask HipLeft: apply=true weight=20
      IKMarkerTask HipRight: apply=true weight=20
      IKMarkerTask KneeLeft: apply=true weight=10
      IKMarkerTask KneeRight: apply=true weight=10
      IKMarkerTask AnkleLeft: apply=true weight=20
      IKMarkerTask AnkleRight: apply=true weight=20
      IKMarkerTask FootLeft: apply=false weight=2
      IKMarkerTask FootRight: apply=false weight=2
      IKMarkerTask SpineMid: apply=true weight=20
      IKMarkerTask SpineShoulder: apply=true weight=20
      IKMarkerTask ShoulderLeft: apply=true weight=20
      IKMarkerTask ShoulderRight: apply=true weight=20
      IKMarkerTask ElbowLeft: apply=true weight=10
      IKMarkerTask ElbowRight: apply=true weight=10
      IKMarkerTask WristLeft: apply=true weight=20
      IKMarkerTask WristRight: apply=true weight=20
      IKMarkerTask HandLeft: apply=false weight=2
      IKMarkerTask HandRight: apply=false weight=2
      IKMarkerTask HandTipLeft: apply=false weight=2
      IKMarkerTask HandTipRight: apply=false weight=2
      IKMarkerTask ThumbLeft: apply=false weight=1
      IKMarkerTask ThumbRight: apply=false weight=1
      IKMarkerTask Neck: apply=true weight=20
      IKMarkerTask Head: apply=true weight=20
